*Heading
** Job name: test_structure
** Generated using compas_fea2 version 0.1.0-8e9bfc20
** Author: N/A
** Date: 06/02/2022 15:36:45
**
*PHYSICAL CONSTANTS, ABSOLUTE ZERO=-273.15, STEFAN BOLTZMANN=5.67e-8
**
**------------------------------------------------------------------
**------------------------------------------------------------------
** MODEL
**------------------------------------------------------------------
**------------------------------------------------------------------
**
**
** PARTS
**
*Part, name=frame
*Node
         1,      0.000,      0.000,      0.000
         2,      1.000,      0.000,      0.000
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*Element, type=B31
10, 10,11
11, 11,12
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*elset, elset=aux_B31_section_A_00_00_-10
1, 2, 3, 4, 5, 6
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** Section: section_A
*Beam Section, elset=aux_B31_section_A_00_00_-10, material=mat_A, section=box
0.2, 0.8, 0.01, 0.01, 0.01, 0.01
0.0, 0.0, -1.0
*elset, elset=aux_B31_section_A_00_00_-10
1, 2, 3, 4, 5, 6
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*End Part
**
**
** ASSEMBLY
**
*Assembly, name=structural_model
**
*Instance, name=frame-1, part=frame
*End Instance
**
*End Assembly
**
**
** MATERIALS
**
*Material, name=mat_A
*Density
2500,
*Elastic
2610, 0.17
**
** INTERACTION PROPERTIES
**
**
** INTERACTIONS
**
**
** INITIAL CONDITIONS
**
** Name: fixed Type: BC/Rotation
*Nset, nset=_aux_fixed_frame-1, internal, instance=frame-1
1
*Boundary
_aux_fixed_frame-1, 1
_aux_fixed_frame-1, 2
_aux_fixed_frame-1, 3
_aux_fixed_frame-1, 4
_aux_fixed_frame-1, 5
_aux_fixed_frame-1, 6
** Name: roller Type: BC/Rotation
*Nset, nset=_aux_roller_frame-1, internal, instance=frame-1
11
*Boundary
_aux_roller_frame-1, 2
**
**------------------------------------------------------------------
**------------------------------------------------------------------
** PROBLEM
**------------------------------------------------------------------
**------------------------------------------------------------------
**
** STEP: step-1
**
*Step, name=step-1, nlgeom=NO, inc=100
*Static
1, 1, 1e-05, 1
**
** - Displacements
**   -------------
**
** - Loads
**   -----
** Name: pload Type: Concentrated Force
*Nset, nset=_aux_pload_frame-1, internal, instance=frame-1
6
*Cload, OP=MOD
_aux_pload_frame-1, 2, -10000
**
** - Output Requests
**   ---------------
**
*Restart, write, frequency=0
**
*End Step
**
