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/batch
! ANSYS input file written by Workbench version 2020 R2
! File used for geometry attach: C:\Users\robin\Documents\TMJoint_v2\tmjoint_static_contact1_files\dp0\SYS\DM\SYS.scdoc
/title,tmjoint_static_contact1--Static Structural (A5)
/com,--- Data in consistent MKS units. See Solving Units in the help system for more information.
/units,MKS
/prep7
! Turn off shape checking because checks already performed inside WB mesher.
! See help system for more information.
SHPP,OFF,,NOWARN
etcon,set             ! allow ANSYS to choose best KEYOP's for 180x elements
/com,*********** Nodes for the whole assembly ***********
nblock,3,,2713
(1i9,3e20.9e3)
        1     6.666666728E-02     1.333333353E-01     6.666666785E-02
        2     6.666666728E-02     6.666666766E-02     6.666666785E-02
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-1
/com,*********** Elements for Body 1 "rightMeshTenonMortise_empty\Corps" ***********
et,1,186
keyo,1,2,1          ! set full integration on SOLID186
eblock,19,solid,,272
(19i9)
        1        1        1        1        0        0        0        0       20        0      130      873     1299     1221     1205     1064     1311     1222     1218
     1328     2299     2270     1327     1962     2300     2293     1961     1326     2435     2298     2269
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-1
/com,*********** Elements for Body 2 "leftMeshTenonMortise_empty\Corps" ***********
et,2,186
keyo,2,2,1          ! set full integration on SOLID186
eblock,19,solid,,129
(19i9)
        2        2        2        2        0        0        0        0       20        0        1      144      233      155      147      145      247      157      146
      679      706      685      678      681      710      683      680      677      846      704      682
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-1
/com,*********** Send User Defined Coordinate System(s) ***********
csys,0
toffst,273.15,  ! Temperature offset from absolute zero
/com,*********** Set Reference Temperature ***********
tref,22.
/com,*********** Send Materials ***********
MP,EX,1,8000000000,	! Pa
MP,NUXY,1,0.4,

MP,EX,2,8000000000,	! Pa
MP,NUXY,2,0.4,

!************************* Model Summary ********************
!rightMeshTenonMortise_empty\Corps,	Seb Material,	matid,	1
!leftMeshTenonMortise_empty\Corps,	Seb Material,	matid,	2
!************************* End Model Summary ********************
/com,*********** Create Contact "Frictional - rightMeshTenonMortise_empty\Corps To leftMeshTenonMortise_empty\Corps" ***********
*set,tid,4
*set,cid,3
r,tid
r,cid
et,tid,170
et,cid,174
eblock,10,,,44
(15i9)
      912        4        4        4        0     1169     1163     1166     1170     2182     2181     2189     2195
      913        4        4        4        0     1168     1164     1163     1169     2185     2180     2182     2193
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-1
eblock,10,,,44
(15i9)
      956        3        3        3        0     1169     1163     1166     1170     2182     2181     2189     2195
      957        3        3        3        0     1168     1164     1163     1169     2185     2180     2182     2193
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-1
eblock,10,,,21
(15i9)
     1000        3        4        3        0      146      147      144      145      682      678      677      680
     1001        3        4        3        0      147      148      143      144      684      675      674      678
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-1
eblock,10,,,21
(15i9)
     1021        4        3        4        0      146      147      144      145      682      678      677      680
     1022        4        3        4        0      147      148      143      144      684      675      674      678
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-1
keyo,cid,8,2               ! auto create asymmetric contact (from Program Controlled setting)
keyo,cid,10,0              ! adjust contact stiffness each NR iteration (from Program Controlled setting)
keyo,cid,12,0              ! standard contact
mp,mu,cid,1.e-008   ! unitless
keyo,cid,18,1              ! small sliding turned on by application
keyo,cid,2,0               ! augmented Lagrange (from Program Controlled setting)
keyo,cid,4,0               ! on Gauss point (from Program Controlled setting)
keyo,cid,9,0               ! use real geometry with stepped effects
keyo,cid,7,0               ! No Prediction
rmod,tid,3,1.       ! FKN
rmod,tid,5,0.       ! ICONT
rmod,tid,6,0.       ! PINB
rmod,tid,10,0.      ! CNOF
rmod,tid,12,0.      ! FKT
rmod,tid,36,59      ! WB DSID
rmod,cid,3,1.       ! FKN
rmod,cid,5,0.       ! ICONT
rmod,cid,6,0.       ! PINB
rmod,cid,10,0.      ! CNOF
rmod,cid,12,0.      ! FKT
rmod,cid,36,59      ! WB DSID
nsel,all
esel,all
/com,*********** Fixed Supports ***********
CMBLOCK,_FIXEDSU,NODE,       40
(8i10)
        97        98       113       128       203       204       205       248
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
cmsel,s,_FIXEDSU
d,all,all
nsel,all
/com,*********** Define Pressure Using Surface Effect Elements ***********
et,5,154
eblock,10,,,52
(15i9)
     1042        5        5        5        0     1225     1227     1274     1226     2306     2310     2307     2305
     1043        5        5        5        0     1224     1239     1227     1225     2304     2309     2306     2303
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-1
esel,s,type,,5
keyop,5,7,0                ! Use deformed area for application of load
esel,all
esel,all
fini
/com,****************************************************************************
/com,*************************    SOLUTION       ********************************
/com,****************************************************************************
/solu
antype,0                   ! static analysis
_thickRatio=  1     ! Ratio of thick parts in the model
eqsl,pcg,1e-8,,,,,,1
cntr,print,1               ! print out contact info and also make no initial contact an error
dmpoption,emat,no             ! Don't combine emat file for DANSYS
dmpoption,esav,no             ! Don't combine esav file for DANSYS
nldiag,cont,iter           ! print out contact info each equilibrium iteration
rescontrol,define,last,last,,dele	   ! Program Controlled
/com,****************************************************
/com,******************* SOLVE FOR LS 1 OF 1 ****************
esel,s,type,,5
nsle
sf,all,pres,300000.
nsel,all
esel,all
esel,all
autots,on                  ! Workbench Program Controlled automatic time stepping
nsub,1,10,1                ! due to presence of general nonlinear
time,1.
outres,erase
outres,all,none
outres,nsol,all,
outres,rsol,all
outres,eangl,all
outres,etmp,all
outres,veng,all
outres,strs,all,
outres,epel,all,
outres,eppl,all,
outres,cont,all,
! *********** WB SOLVE COMMAND ***********
! check interactive state
*get,ANSINTER_,active,,int
*if,ANSINTER_,ne,0,then
/eof
*endif
solve
/com *************** Write FE CONNECTORS *********
CEWRITE,file,ce,,INTE
/com,****************************************************
/com,*************** FINISHED SOLVE FOR LS 1 *************
*get,_PCGITER,active,,solu,cgiter
/post1
fini
